// COMSOL Multiphysics 5.4.0.346 model "Untitled.mph"
// Outline of the model tree

Parameters
  DL = 0.0002[m]  // Defect length
  DW = 1e-05[m]  // Defect width
  DH = 2e-08[m]  // Defect height
  Dx = 0[m]  // Defect x position
  Dy = 0[m]  // Defect y position
  Dz = 0[m]  // Defect z position
  kx = 31415.9265[1/m]  // Defect length
  MS = 1e-05[m]  // Mesh typical size
  NumofUC = 2[1]  // Unitcell number on one side

Geometry
  geom1 "Geometry 1" (3D, length unit m)
    wp1: WorkPlane
      defect: Rectangle | base = center; size = {2.0E-4, 1.0E-5}
      UCR1: Rectangle (disabled) | base = center; size = {2.0E-4, 1.0E-5}
      UCR2: Rectangle (disabled) | base = center; size = {1.0E-4, 2.0E-5}
      UCUnion1: Union (disabled) | input = UCR1, UCR2; intbnd = off; edge = all
      UCCharm1: Chamfer (disabled) | point = UCUnion1(1) points 3, 6, 7, 10; dist = 5.0E-6
      UCFillet1: Fillet (disabled) | point = UCCharm1(1) points 3-10; radius = 5.0E-6
      UCR1_1: Rectangle "Rectangle 1a" | pos = {-4.0E-4, 0}; base = center; size = {2.0E-4, 1.0E-5}
      UCR2_1: Rectangle "Rectangle 1b" | pos = {-4.0E-4, 0}; base = center; size = {1.0E-4, 2.0E-5}
      UCUnion1_1: Union "Union 1a" | input = UCR1_1, UCR2_1; intbnd = off; edge = all
      UCCharm1_1: Chamfer "Chamfer 1a" | point = UCUnion1_1(1) points 3, 6, 7, 10; dist = 5.0E-6
      UCFillet1_1: Fillet "Fillet 1a" | point = UCCharm1_1(1) points 3-10; radius = 5.0E-6
      UCR1_2: Rectangle "Rectangle 2a" | pos = {-2.0E-4, 0}; base = center; size = {2.0E-4, 1.0E-5}
      UCR2_2: Rectangle "Rectangle 2b" | pos = {-2.0E-4, 0}; base = center; size = {1.0E-4, 2.0E-5}
      UCUnion1_2: Union | input = UCR1_2, UCR2_2; intbnd = off; edge = all
      UCCharm1_2: Chamfer | point = UCUnion1_2(1) points 3, 6, 7, 10; dist = 5.0E-6
      UCFillet1_2: Fillet | point = UCCharm1_2(1) points 3-10; radius = 5.0E-6
      UCR1_3: Rectangle | pos = {2.0E-4, 0}; base = center; size = {2.0E-4, 1.0E-5}
      UCR2_3: Rectangle "Rectangle 3a" | pos = {2.0E-4, 0}; base = center; size = {1.0E-4, 2.0E-5}
      UCUnion1_3: Union | input = UCR1_3, UCR2_3; intbnd = off; edge = all
      UCCharm1_3: Chamfer | point = UCUnion1_3(1) points 3, 6, 7, 10; dist = 5.0E-6
      UCFillet1_3: Fillet | point = UCCharm1_3(1) points 3-10; radius = 5.0E-6
      UCR1_4: Rectangle | pos = {4.0E-4, 0}; base = center; size = {2.0E-4, 1.0E-5}
      UCR2_4: Rectangle "Rectangle 4a" | pos = {4.0E-4, 0}; base = center; size = {1.0E-4, 2.0E-5}
      UCUnion1_4: Union | input = UCR1_4, UCR2_4; intbnd = off; edge = all
      UCCharm1_4: Chamfer | point = UCUnion1_4(1) points 3, 6, 7, 10; dist = 5.0E-6
      UCFillet1_4: Fillet | point = UCCharm1_4(1) points 3-10; radius = 5.0E-6
      Uni: Union | input = UCFillet1_1, UCFillet1_2, UCFillet1_3, UCFillet1_4, defect
    ext1: Extrude | input = wp1; distance = 1
    fin: Finalize "Form Union"

Materials
  Si3N4: Common on all domains
    def "Basic"
      electricconductivity = 0[S/m]
      thermalexpansioncoefficient = 2.3e-6[1/K]
      heatcapacity = 700[J/(kg*K)]
      relpermittivity = 9.7
      density = 3100[kg/m^3]
      thermalconductivity = 20[W/(m*K)]
      youngsmodulus = 250e9[Pa]
      poissonsratio = 0.23

Physics
  solid: SolidMechanics on all domains
    dependent variable u = {u, v, w}
    lemm1: LinearElasticModel "Linear Elastic Material 1" (default)
      iss1: InitialStressandStrain on all domains
    free1: Free (default)
    init1: init "Initial Values 1" (default)
    fix1: Fixed "Fixed Constraint 1" on no boundaries

Mesh
  mesh
    size: MeshSizeDefault | hmax = 0.1; hmin = 0.018; hcurve = 0.6; hnarrow = 0.5; hgrad = 1.5
    ftri: FreeTri "Free Triangular" on no boundaries
    swel: Sweep "Swept" on remaining entities

Studies
  std "Study"
    stat: Stationary | geometricNonlinearity = on
    eig: Eigenfrequency | shift = 1[Hz]; geometricNonlinearity = on